// SBML level 2 version 5

function _0cff4778b8544425a8f24c115e2b8d09(volume, Et, kcat_for, S2, KM_S2)
  volume*Et*kcat_for*(S2/KM_S2)/((S2/KM_S2)^0 + (S2/KM_S2)^1);
end
_0cff4778b8544425a8f24c115e2b8d09 is "Convenience (irreversible): 1 reactants";

function _99bf31ddb9f14e09ad39e775d9f9635f(volume, Et, kcat_for, S3, KM_S3, S4, KM_S4)
  volume*Et*kcat_for*(S3/KM_S3)*(S3/KM_S3)*(S3/KM_S3)*(S4/KM_S4)/(((S3/KM_S3)^0 + (S3/KM_S3)^1 + (S3/KM_S3)^2 + (S3/KM_S3)^3)*((S4/KM_S4)^0 + (S4/KM_S4)^1));
end
_99bf31ddb9f14e09ad39e775d9f9635f is "Convenience (irreversible): 2 reactants";

function _48997175b00a49cfa248373800ce8ae4(volume, Et, kcat_for, S1, KM_S1, S2, KM_S2, S3, KM_S3)
  volume*Et*kcat_for*(S1/KM_S1)*(S2/KM_S2)*(S3/KM_S3)/(((S1/KM_S1)^0 + (S1/KM_S1)^1)*((S2/KM_S2)^0 + (S2/KM_S2)^1)*((S3/KM_S3)^0 + (S3/KM_S3)^1));
end
_48997175b00a49cfa248373800ce8ae4 is "Convenience (irreversible): 3 reactants";

model main()

  // Compartments:
  compartment c = 1e-15;

  // Species:
  species $_CHEBI_16526 in c = 0; _CHEBI_16526 is "Carbon dioxide";  // pubmed:23828359 kegg.drug:D00004 inchikey:CURLTUGMZLYLDI-UHFFFAOYSA-N hmdb:HMDB01967
  species _CHEBI_57384 in c = 3.5e-5; _CHEBI_57384 is "malonyl-CoA(5-)";  // inchi:InChI=1S/C24H38N7O19P3S/c1-24(2,19(37)22(38)27-4-3-13(32)26-5-6-54-15(35)7-14(33)34)9-47-53(44,45)50-52(42,43)46-8-12-18(49-51(39,40)41)17(36)23(48-12)31-11-30-16-20(25)28-10-29-21(16)31/h10-12,17-19,23,36-37H,3-9H2,1-2H3,(H,26,32)(H,27,38)(H,33,34)(H,42,43)(H,44,45)(H2,25,28,29)(H2,39,40,41)/p-5/t12-,17-,18-,19+,23-/m1/s1 CHEBI:57384
  species _CHEBI_30616 in c = 9.6e-3; _CHEBI_30616 is "ATP(4-)";  // inchi:InChI=1S/C10H16N5O13P3/c11-8-5-9(13-2-12-8)15(3-14-5)10-7(17)6(16)4(26-10)1-25-30(21,22)28-31(23,24)27-29(18,19)20/h2-4,6-7,10,16-17H,1H2,(H,21,22)(H,23,24)(H2,11,12,13)(H2,18,19,20)/p-4/t4-,6-,7-,10-/m1/s1 CHEBI:30616
  species $_CHEBI_24636 in c = 3.2e-8; _CHEBI_24636 is "proton";  // cas:12408-02-5 kegg.compound:C00080 inchi:InChI=1S/p+1/i/hH CHEBI:24636
  species _CHEBI_28157 in c = 0; _CHEBI_28157 is "pinocembrin";  // cas:480-39-7 lipidmaps:LMPK12140214 knapsack:C00000992 wikipedia.en:Pinocembrin
  species $_CHEBI_15377 in c = 55; _CHEBI_15377 is "water";  // wikipedia.en:Water pubmed:863843 kegg.drug:D00001 inchikey:XLYOFNOQVPJJNP-UHFFFAOYSA-N
  species _CHEBI_80484 in c = 0; _CHEBI_80484 is "pinocembrin chalcone";  // lipidmaps:LMPK12120243 knapsack:C00006933 pubmed:20921932 kegg.compound:C16404
  species _CHEBI_456215 in c = 2.8e-4; _CHEBI_456215 is "AMP(2-)";  // hmdb:HMDB00045 inchi:InChI=1S/C10H14N5O7P/c11-8-5-9(13-2-12-8)15(3-14-5)10-7(17)6(16)4(22-10)1-21-23(18,19)20/h2-4,6-7,10,16-17H,1H2,(H2,11,12,13)(H2,18,19,20)/p-2/t4-,6-,7-,10-/m1/s1 CHEBI:456215
  species _CHEBI_58095 in c = 1.8e-5; _CHEBI_58095 is "L-phenylalanine zwitterion";  // pubmed:21956539 inchi:InChI=1S/C9H11NO2/c10-8(9(11)12)6-7-4-2-1-3-5-7/h1-5,8H,6,10H2,(H,11,12)/t8-/m0/s1 CHEBI:58095
  species _CHEBI_35697 in c = 0; _CHEBI_35697 is "trans-Cinnamic acid";  // kegg.compound:C00423 pubmed:11486831 chemspider:392447 chemidplus:0000140103
  species _CHEBI_57287 in c = 2.8e-4; _CHEBI_57287 is "coenzyme A(4-)";  // cas:85-61-0 inchi:InChI=1S/C21H36N7O16P3S/c1-21(2,16(31)19(32)24-4-3-12(29)23-5-6-48)8-41-47(38,39)44-46(36,37)40-7-11-15(43-45(33,34)35)14(30)20(42-11)28-10-27-13-17(22)25-9-26-18(13)28/h9-11,14-16,20,30-31,48H,3-8H2,1-2H3,(H,23,29)(H,24,32)(H,36,37)(H,38,39)(H2,22,25,26)(H2,33,34,35)/p-4/t11-,14-,15-,16+,20-/m1/s1 CHEBI:57287
  species $_CHEBI_33019 in c = 0; _CHEBI_33019 is "diphosphate(3-)";  // inchi:InChI=1S/H4O7P2/c1-8(2,3)7-9(4,5)6/h(H2,1,2,3)(H2,4,5,6)/p-3 CHEBI:33019
  species _CHEBI_57252 in c = 0; _CHEBI_57252 is "(E)-cinnamoyl-CoA(4-)";  // inchi:InChI=1S/C30H42N7O17P3S/c1-30(2,25(41)28(42)33-11-10-20(38)32-12-13-58-21(39)9-8-18-6-4-3-5-7-18)15-51-57(48,49)54-56(46,47)50-14-19-24(53-55(43,44)45)23(40)29(52-19)37-17-36-22-26(31)34-16-35-27(22)37/h3-9,16-17,19,23-25,29,40-41H,10-15H2,1-2H3,(H,32,38)(H,33,42)(H,46,47)(H,48,49)(H2,31,34,35)(H2,43,44,45)/p-4/b9-8+/t19-,23-,24-,25+,29-/m1/s1 CHEBI:57252
  species $_CHEBI_28938 in c = 0; _CHEBI_28938 is "ammonium";  // cas:14798-03-9 wikipedia.en:Ammonium pubmed:22265469 kegg.compound:C01342
  species $_P35510 in c = 1e-5; _P35510 is "Phenylalanine ammonia-lyase 1";  // uniprot:P35510
  species $_P13114 in c = 1e-5; _P13114 is "Chalcone synthase";  // uniprot:P13114
  species $_Q9FKW3 in c = 1e-5; _Q9FKW3 is "Chalcone--flavonone isomerase 2";  // uniprot:Q9FKW3
  species $_Q9K3W1 in c = 1e-5; _Q9K3W1 is "4-coumarate:CoA ligase";  // uniprot:Q9K3W1

  // Reactions:
  _MNXR93681: $_CHEBI_24636 + _CHEBI_58095 => $_CHEBI_28938 + _CHEBI_35697; _0cff4778b8544425a8f24c115e2b8d09(c, _P35510, _MNXR93681_kcat_for, _CHEBI_58095, KM__CHEBI_58095);  // modifiers: _P35510; ec-code:4.3.1.24 ec-code:4.3.1.25 ec-code:4.3.1.5
    _MNXR93681_kcat_for = 47 per_sec; KM__CHEBI_58095 = 6.8e-5 M;
  _MNXR17733: $_CHEBI_15377 + $_CHEBI_24636 + 3 _CHEBI_57384 + _CHEBI_57252 => 3 $_CHEBI_16526 + 4 _CHEBI_57287 + _CHEBI_80484; _99bf31ddb9f14e09ad39e775d9f9635f(c, _P13114, _MNXR17733_kcat_for, _CHEBI_57384, KM__CHEBI_57384, _CHEBI_57252, KM__CHEBI_57252);  // modifiers: _P13114; ec-code:2.3.1.74 kegg.reaction:R07987
    _MNXR17733_kcat_for = 2.1e-2 per_sec; KM__CHEBI_57384 = 2.2e-3 M; KM__CHEBI_57252 = 4.7e-3 M;
  _MNXR85703: $_CHEBI_24636 + _CHEBI_80484 => $_CHEBI_24636 + _CHEBI_28157; _0cff4778b8544425a8f24c115e2b8d09(c, _Q9FKW3, _MNXR85703_kcat_for, _CHEBI_80484, KM__CHEBI_80484);  // modifiers: _Q9FKW3; ec-code:5.5.1.6 kegg.reaction:R07990
    _MNXR85703_kcat_for = 85 per_sec; KM__CHEBI_80484 = 1.8e-2 M;
  _MNXR15003: _CHEBI_57287 + _CHEBI_30616 + _CHEBI_35697 => $_CHEBI_33019 + $_CHEBI_24636 + _CHEBI_456215 + _CHEBI_57252; _48997175b00a49cfa248373800ce8ae4(c, _Q9K3W1, _MNXR15003_kcat_for, _CHEBI_57287, KM__CHEBI_57287, _CHEBI_30616, KM__CHEBI_30616, _CHEBI_35697, KM__CHEBI_35697);  // modifiers: _Q9K3W1; ec-code:6.2.1.12 kegg.reaction:R02255
    _MNXR15003_kcat_for = 0.1 per_sec; KM__CHEBI_57287 = 2.5e-1 M; KM__CHEBI_30616 = 1.5e-1 M; KM__CHEBI_35697 = 2.8e-1 M;

  // Unit definitions:
  unit per_sec = 1 / second;
  unit M = mole / litre;
  unit M_per_sec = mole / (litre * second);
end
